# OpenSim document version 30516
AnalyzeTool KS_Refwalk:
  model_file: C:\Users\u0088756\Documents\PostDoc\Software\ExoSimulation\BenchMarkTest\Data\Gait92Model\scaled_model_marker.osim
  replace_force_set: false
  results_directory: C:\Users\u0088756\Documents\PostDoc\Software\ExoSimulation\BenchMarkTest\Data\Gait92Model\EvaluateAFO_results\MuscleAnalysis
  output_precision: 8
  initial_time: 10.059
  final_time: 11.146
  solve_for_equilibrium_for_auxiliary_states: false
  maximum_number_of_integrator_steps: 20000
  maximum_integrator_step_size: 1
  minimum_integrator_step_size: 1e-8
  integrator_error_tolerance: 1e-5
  coordinates_file: C:\Users\u0088756\Documents\PostDoc\Software\ExoSimulation\BenchMarkTest\Data\Gait92Model\KS_Refwalk.mot
  lowpass_cutoff_frequency_for_coordinates: -1
  AnalysisSet Analyses:
    MuscleAnalysis: start_time=0 end_time=10 step_interval=1 in_degrees=true muscle_list=all
        moment_arm_coordinate_list=all compute_moments=true
